echo none

# -------------------------------- CHARMM FORCEFIELD --------------------------------

units           real
boundary        p p p

newton          off
pair_style      lj/charmmfsw/coul/long 10 12
pair_modify     mix arithmetic
kspace_style    pppm 1e-4

atom_style      full
bond_style      harmonic
angle_style     charmm
dihedral_style  charmmfsw
special_bonds   charmm
improper_style  harmonic
timestep        1

neighbor        2 bin
neigh_modify    delay 5 every 1

# -------------------------------- DATA and FIXES --------------------------------

fix cmap all cmap charmmff.cmap
fix_modify cmap energy yes

read_data osmr.data fix cmap crossterm CMAP &
  extra/atom/types 3 extra/bond/types 1 extra/angle/types 1

group protein id 1:15370
molecule tip3p_mol tip3p.mol toff 38 boff 72 aoff 166

# WARNING: Should not use fix nve/limit with fix shake or fix rattle
#fix 1 all shake 1e-6 500 ${dcdfreq} m 1.008 b 73 a 167
#fix 1 all shake 1e-6 500 ${dcdfreq} mol tip3p_mol

fix 2 all nve/limit 0.1
fix 3 all langevin 313.15 313.15 100.0 12345
fix 4 protein recenter INIT INIT INIT shift all

# -------------------------------- COMPUTE and THERMO --------------------------------

thermo 10
thermo_style custom step time spcpu cpuremain etotal temp press vol f_2

# -------------------------------- SOLVATE --------------------------------

mass 39 15.999  # OT
mass 40 1.008  # HT
mass 41 22.990  # SOD
pair_coeff 39 39 0.15210000000000 3.15057422683150 0.15210000000000 3.15057422683150 # OT OT
pair_coeff 40 40 0.04600000000000 0.40001352444501 0.04600000000000 0.40001352444501 # HT HT
pair_coeff 41 41 0.04690000000000 2.51367073323297 0.04690000000000 2.51367073323297 # SOD SOD
bond_coeff 73 450.000 0.9572 # HT OT
angle_coeff 167 55.00000 104.52000 0.00000 0.00000 # HT OT HT

neigh_modify one 4000
region outside block -80 60 -80 50 -165 120 side out
create_atoms 41 random 27 12345 outside
set type 41 charge +1.0
group ions type 41
lattice sc 3.1
create_atoms 0 box mol tip3p_mol 12345
velocity all create 313.15 12345 dist gaussian
group protein_ions union protein ions
group water subtract all protein_ions
delete_atoms overlap 5 water protein_ions compress no bond yes mol yes

# -------------------------------- MINIMIZE and RELAX --------------------------------

#minimize 1e-4 0.0 1000 10000
#run 1000
minimize 1e-4 0.0 100 10000
run 100
write_data osmr-min.data

# -------------------------------- DUMP and RUN --------------------------------

unfix 2
unfix 3

variable dt equal 2
timestep ${dt}
#fix 1 all shake 1e-6 500 1000 mol tip3p_mol
#fix 1 all shake 1e-6 500 1000 b 73 a 167 t 39 40
fix 1 all shake 1e-6 500 1000 b 73 a 167
fix 2 all npt temp 313.15 313.15 $(100.0*dt) iso 1.0 1.0 $(1000.0*dt) couple xyz mtk no pchain 0

dump 1 protein_ions dcd 10 osmr.dcd
dump 2 protein_ions custom 10 osmr.dump id mol type x y z vx vy vz ix iy iz

reset_timestep 0
run 1000000
